// COMSOL Multiphysics 6.3.0.420 model "model_1.mph"
// Outline of the model tree

Geometry
  geom1 "Geometry 1" (3D, length unit m)
    cyl_cavity: Cylinder | r = 0.0045; h = 0.05
    cyl_stub: Cylinder | r = 0.0015; h = 0.015
    diff1: Difference | input = cyl_cavity; input2 = cyl_stub; keepsubtract = on; intbnd = off; face = all
    fin: Finalize "Form Union"

Materials
  mat1: Common "Material 1" on all domains
    def: def "Basic"
      relpermittivity = 1
      relpermeability = 1
      electricconductivity = 0

Physics
  emw: ElectromagneticWaves "Electromagnetic Waves, Frequency Domain" on all domains
    dependent variable E = {Ex, Ey, Ez}
    wee1: WaveEquationElectric (default)
    pec1: PerfectElectricConductor (default)
    init1: init "Initial Values 1" (default)
    pec2: DomainPerfectElectricConductor "Perfect Electric Conductor 2" on domains 2
    sctr1: Scattering "Scattering Boundary Condition 1" on boundaries 4

Mesh
  mesh1 "Mesh 1" (physics-controlled)
    size: MeshSizeDefault | hauto = 3

Studies
  std1 "Study 1"
    eig: Eigenfrequency | neigs = 5; shift = 3[GHz]; eigwhich = lr

Solver configurations
  sol1 "Solution 1" (study std1)
    v1: Variables "Dependent Variables 1"
    e1: Eigenvalue "Eigenvalue Solver 1"
      d1: Direct "Suggested Direct Solver (emw)"

Datasets
  dset1: Solution | solution = sol1
  cpl1: CutPlane | data = dset1; quickplane = xz

Plots
  pg1: PlotGroup3D "3D Plot Group 1" | data = dset1
    vol1: Volume | data = dset1; expr = emw.normE
    surf1: Surface | data = cpl1; expr = emw.normE